[ψ[sα]; ψ[sβ]; ψ[rα]; ψ[rβ]] == [L[s], 0, L[M], 0; 0, L[s], 0, L[M]; L[M], 0, L[r], 0; 0, L[M], 0, L[r]]*[i[sα]; i[sβ]; i[rα]; i[rβ]]
[i[sα]; i[sβ]; i[rα]; i[rβ]] == [L[s], 0, L[M], 0; 0, L[s], 0, L[M]; L[M], 0, L[r], 0; 0, L[M], 0, L[r]]^-1*[ψ[sα]; ψ[sβ]; ψ[rα]; ψ[rβ]]
[L[s], 0, L[M], 0; 0, L[s], 0, L[M]; L[M], 0, L[r], 0; 0, L[M], 0, L[r]]^-1 simplify → [
    -L[r]/(L[M]^2 - L[r]*L[s]), 0, L[M]/(L[M]^2 - L[r]*L[s]), 0;
    0, -L[r]/(L[M]^2 - L[r]*L[s]), 0, L[M]/(L[M]^2 - L[r]*L[s]);
    L[M]/(L[M]^2 - L[r]*L[s]), 0, -L[s]/(L[M]^2 - L[r]*L[s]), 0;
    0, L[M]/(L[M]^2 - L[r]*L[s]), 0, -L[s]/(L[M]^2 - L[r]*L[s])
] substitute, L[M]^2 - L[r]*L[s] == -σ*L[s]*L[r]; simplify → [
    1/(σ*L[s]), 0, -L[M]/(σ*L[r]*L[s]), 0;
    0, 1/(σ*L[s]), 0, -L[M]/(σ*L[r]*L[s]);
    -L[M]/(σ*L[r]*L[s]), 0, 1/(σ*L[r]), 0;
    0, -L[M]/(σ*L[r]*L[s]), 0, 1/(σ*L[r])
]
-[R[s], 0, 0, 0; 0, R[s], 0, 0; 0, 0, R[r], 0; 0, 0, 0, R[r]]*[
    1/(σ*L[s]), 0, -L[M]/(σ*L[r]*L[s]), 0;
    0, 1/(σ*L[s]), 0, -L[M]/(σ*L[r]*L[s]);
    -L[M]/(σ*L[r]*L[s]), 0, 1/(σ*L[r]), 0;
    0, -L[M]/(σ*L[r]*L[s]), 0, 1/(σ*L[r])
] - [0, 0, 0, 0; 0, 0, 0, 0; 0, 0, 0, ω[r]; 0, 0, -ω[r], 0] simplify → [
    -R[s]/(σ*L[s]), 0, L[M]*R[s]/(σ*L[r]*L[s]), 0;
    0, -R[s]/(σ*L[s]), 0, L[M]*R[s]/(σ*L[r]*L[s]);
    L[M]*R[r]/(σ*L[r]*L[s]), 0, -R[r]/(σ*L[r]), -ω[r];
    0, L[M]*R[r]/(σ*L[r]*L[s]), ω[r], -R[r]/(σ*L[r])
]
