T[e] == 1.5*n[p]*L[M]*(i[sβ]*i[rα] - i[sα]*i[rβ])
ψ[sα] == L[s]*i[sα] + L[M]*i[rα] solve, i[rα] → -(L[s]*i[sα] - ψ[sα])/L[M]
ψ[sβ] == L[s]*i[sβ] + L[M]*i[rβ] solve, i[rβ] → -(L[s]*i[sβ] - ψ[sβ])/L[M]
1.5*n[p]*L[M]*(i[sβ]*i[rα] - i[sα]*i[rβ]) substitute, i[rα] == -(L[s]*i[sα] - ψ[sα])/L[M]; substitute, i[rβ] == -(L[s]*i[sβ] - ψ[sβ])/L[M]; collect, 1.5*n[p] → (1.0*ψ[sα]*i[sβ] - 1.0*ψ[sβ]*i[sα])*(1.5*n[p])
ψ[rα] == L[r]*i[rα] + L[M]*i[sα] solve, i[rα] → -(L[M]*i[sα] - ψ[rα])/L[r]
ψ[rβ] == L[r]*i[rβ] + L[M]*i[sβ] solve, i[rβ] → -(L[M]*i[sβ] - ψ[rβ])/L[r]
1.5*n[p]*L[M]*(i[sβ]*i[rα] - i[sα]*i[rβ]) substitute, i[rα] == -(L[M]*i[sα] - ψ[rα])/L[r]; substitute, i[rβ] == -(L[M]*i[sβ] - ψ[rβ])/L[r]; simplify; collect, 1.5*n[p] → (1.0*ψ[rα]*i[sβ] - 1.0*ψ[rβ]*i[sα])*L[M]/L[r]*(1.5*n[p])
ψ[rα] == L[r]*i[rα] + L[M]*i[sα] solve, i[sα] → -(L[r]*i[rα] - ψ[rα])/L[M]
ψ[rβ] == L[r]*i[rβ] + L[M]*i[sβ] solve, i[sβ] → -(L[r]*i[rβ] - ψ[rβ])/L[M]
1.5*n[p]*L[M]*(i[sβ]*i[rα] - i[sα]*i[rβ]) substitute, i[sα] == -(L[r]*i[rα] - ψ[rα])/L[M]; substitute, i[sβ] == -(L[r]*i[rβ] - ψ[rβ])/L[M]; simplify; collect, 1.5*n[p] → (1.0*ψ[rβ]*i[rα] - 1.0*ψ[rα]*i[rβ])*(1.5*n[p])
ψ[sα] == L[s]*i[sα] + L[M]*i[rα] solve, i[sα] → -(L[M]*i[rα] - ψ[sα])/L[s]
ψ[sβ] == L[s]*i[sβ] + L[M]*i[rβ] solve, i[sβ] → -(L[M]*i[rβ] - ψ[sβ])/L[s]
1.5*n[p]*L[M]*(i[sβ]*i[rα] - i[sα]*i[rβ]) substitute, i[sα] == -(L[M]*i[rα] - ψ[sα])/L[s]; substitute, i[sβ] == -(L[M]*i[rβ] - ψ[sβ])/L[s]; simplify; collect, 1.5*n[p] → (-(1.0*ψ[sα]*i[rβ] - 1.0*ψ[sβ]*i[rα])*L[M]/L[s])*(1.5*n[p])
[ψ[sα] == L[s]*i[sα] + L[M]*i[rα]; ψ[rα] == L[r]*i[rα] + L[M]*i[sα]] solve, i[sα], i[rα] → [(L[M]*ψ[rα] - L[r]*ψ[sα])/(L[M]^2 - L[r]*L[s]), (L[M]*ψ[sα] - L[s]*ψ[rα])/(L[M]^2 - L[r]*L[s])]
[ψ[sβ] == L[s]*i[sβ] + L[M]*i[rβ]; ψ[rβ] == L[r]*i[rβ] + L[M]*i[sβ]] solve, i[sβ], i[rβ] → [(L[M]*ψ[rβ] - L[r]*ψ[sβ])/(L[M]^2 - L[r]*L[s]), (L[M]*ψ[sβ] - L[s]*ψ[rβ])/(L[M]^2 - L[r]*L[s])]
1.5*n[p]*L[M]*(i[sβ]*i[rα] - i[sα]*i[rβ]) substitute, i[sα] == (L[M]*ψ[rα] - L[r]*ψ[sα])/(L[M]^2 - L[r]*L[s]); substitute, i[rα] == (L[M]*ψ[sα] - L[s]*ψ[rα])/(L[M]^2 - L[r]*L[s]); substitute, i[sβ] == (L[M]*ψ[rβ] - L[r]*ψ[sβ])/(L[M]^2 - L[r]*L[s]); substitute, i[rβ] == (L[M]*ψ[sβ] - L[s]*ψ[rβ])/(L[M]^2 - L[r]*L[s]); simplify; collect, 1.5*n[p] → (-0.5*(2.0*ψ[rα]*ψ[sβ] - 2.0*ψ[rβ]*ψ[sα])*L[M]/(L[M]^2 - 1.0*L[r]*L[s]))*(1.5*n[p])
(-0.5*(2.0*ψ[rα]*ψ[sβ] - 2.0*ψ[rβ]*ψ[sα])*L[M]/(L[M]^2 - 1.0*L[r]*L[s]))*(1.5*n[p]) simplify; substitute, L[M]^2 - 1.0*L[r]*L[s] == -σ*L[s]*L[r]; collect, n[p]*L[M]; collect, 1.5/(σ*L[r]*L[s]) → (1.0*ψ[rα]*ψ[sβ] - 1.0*ψ[rβ]*ψ[sα])*L[M]*n[p]*1.5/(σ*L[r]*L[s])
(ψ[sα] + a*ψ[sβ])*(i[rα] - a*i[rα]) collect, a → (-ψ[sβ]*i[rα])*a^2 + (ψ[sβ]*i[rα] - ψ[sα]*i[rα])*a + ψ[sα]*i[rα]
