# Clarke:
2/3*[1, -1/2, -1/2; 0, sqrt(3)/2, -sqrt(3)/2]
# park
[cos(θ), sin(θ), 0; -sin(θ), cos(θ), 0; 0, 0, 1]
2/3*[1, -1/2, -1/2; 0, sqrt(3)/2, -sqrt(3)/2; 1/2, 1/2, 1/2]
[cos(θ), sin(θ); -sin(θ), cos(θ)]
sin(π) = 1.22461e-16
# inverse park
[cos(θ), -sin(θ); sin(θ), cos(θ)]
atan(2) = 1.10715
[cos(θ), -sin(θ), 0; sin(θ), cos(θ), 0; 0, 0, 1]
# Inverse Clarke:
[1, 0; -1/2, sqrt(3)/2; -1/2, -sqrt(3)/2]
[1, 0, 1; -1/2, sqrt(3)/2, 1; -1/2, -sqrt(3)/2, 1]
Xabc == [X*cos(ω*t); X*cos(ω*t - 2/3*π); X*cos(ω*t + 2/3*π)]
[cos(θ), sin(θ), 0; -sin(θ), cos(θ), 0; 0, 0, 1]*[cos(θ), -sin(θ), 0; sin(θ), cos(θ), 0; 0, 0, 1] → [cos(θ)^2 + sin(θ)^2, 0, 0; 0, cos(θ)^2 + sin(θ)^2, 0; 0, 0, 1]
# Clarke:
2/3*[1, -1/2, -1/2; 0, sqrt(3)/2, -sqrt(3)/2]*[X*cos(ω*t); X*cos(ω*t - 2/3*π); X*cos(ω*t + 2/3*π)] simplify → [X*cos(ω*t); X*sin(ω*t)]
[cos(θ), -sin(θ), 0; sin(θ), cos(θ), 0; 0, 0, 1]
# Park:
[cos(ω*t), sin(ω*t); -sin(ω*t), cos(ω*t)]*[X*cos(ω*t); X*sin(ω*t)] simplify → [X; 0]
Vαβ == [cos(ω*t); sin(ω*t)]
[cos(θ), -sin(θ); sin(θ), cos(θ)]*[cos(ω*t); sin(ω*t)] simplify → [cos(θ + ω*t); sin(θ + ω*t)]
[R, 0, 0; 0, R, 0; 0, 0, R]
2/3*[1, -1/2, -1/2; 0, sqrt(3)/2, -sqrt(3)/2]*[R, 0, 0; 0, R, 0; 0, 0, R]*[ia; ib; ic] → [2*R*ia/3 - R*ib/3 - R*ic/3; sqrt(3)*R*ib/3 - sqrt(3)*R*ic/3]
2/3*[1, -1/2, -1/2; 0, sqrt(3)/2, -sqrt(3)/2; 1/2, 1/2, 1/2]*[Lm + Lls, -0.5*Lm, -0.5*Lm; -0.5*Lm, Lm + Lls, -0.5*Lm; -0.5*Lm, -0.5*Lm, Lm + Lls]*[1, 0, 1; -1/2, sqrt(3)/2, 1; -1/2, -sqrt(3)/2, 1] simplify → [1.5*Lm + Lls, 0, 0; 0, 1.5*Lm + Lls, 0; 0, 0, Lls]
# Lss
2/3*[1, -1/2, -1/2; 0, sqrt(3)/2, -sqrt(3)/2; 1/2, 1/2, 1/2]*Lm*[
    cos(θ), cos(θ + 2/3*π), cos(θ - 2/3*π);
    cos(θ - 2/3*π), cos(θ), cos(θ + 2/3*π);
    cos(θ + 2/3*π), cos(θ - 2/3*π), cos(θ)
]*[1, 0, 1; -1/2, sqrt(3)/2, 1; -1/2, -sqrt(3)/2, 1]*[cos(θ), sin(θ), 0; -sin(θ), cos(θ), 0; 0, 0, 1] simplify → [3*Lm/2, 0, 0; 0, 3*Lm/2, 0; 0, 0, 0]
# Lsr(θr)
[cos(θ), -sin(θ), 0; sin(θ), cos(θ), 0; 0, 0, 1]*2/3*[1, -1/2, -1/2; 0, sqrt(3)/2, -sqrt(3)/2; 1/2, 1/2, 1/2]*Lm*[
    cos(θ), cos(θ - 2*π/3), cos(2*π/3 + θ);
    cos(2*π/3 + θ), cos(θ), cos(θ - 2*π/3);
    cos(θ - 2*π/3), cos(2*π/3 + θ), cos(θ)
]*[1, 0, 1; -1/2, sqrt(3)/2, 1; -1/2, -sqrt(3)/2, 1] simplify → [3*Lm/2, 0, 0; 0, 3*Lm/2, 0; 0, 0, 0]
# Lrs(θr)
[Lm + Llr, -0.5*Lm, -0.5*Lm; -0.5*Lm, Lm + Llr, -0.5*Lm; -0.5*Lm, -0.5*Lm, Lm + Llr]
[cos(θ), -sin(θ), 0; sin(θ), cos(θ), 0; 0, 0, 1]*2/3*[1, -1/2, -1/2; 0, sqrt(3)/2, -sqrt(3)/2; 1/2, 1/2, 1/2]*[Lm + Llr, -0.5*Lm, -0.5*Lm; -0.5*Lm, Lm + Llr, -0.5*Lm; -0.5*Lm, -0.5*Lm, Lm + Llr]*[1, 0, 1; -1/2, sqrt(3)/2, 1; -1/2, -sqrt(3)/2, 1]*[cos(θ), sin(θ), 0; -sin(θ), cos(θ), 0; 0, 0, 1] simplify → [
    1.5*Lm + Llr - 1.66666669792e-22*Lm*cos(2.0*θ), -1.66666666667e-22*Lm*sin(2*θ), -3.33333333333e-22*Lm*cos(θ);
    -1.66666666667e-22*Lm*sin(2*θ), 1.5*Lm + Llr + 1.66666669792e-22*Lm*cos(2.0*θ), -3.33333333333e-22*Lm*sin(θ);
    0, 0, Llr
]
2/3*[1, -1/2, -1/2; 0, sqrt(3)/2, -sqrt(3)/2; 1/2, 1/2, 1/2]*[Lm + Llr, -0.5*Lm, -0.5*Lm; -0.5*Lm, Lm + Llr, -0.5*Lm; -0.5*Lm, -0.5*Lm, Lm + Llr]*[1, 0, 1; -1/2, sqrt(3)/2, 1; -1/2, -sqrt(3)/2, 1] simplify → [1.5*Lm + Llr, 0, 0; 0, 1.5*Lm + Llr, 0; 0, 0, Llr]
[cos(θ), -sin(θ), 0; sin(θ), cos(θ), 0; 0, 0, 1]*[1.5*Lm + Llr, 0, 0; 0, 1.5*Lm + Llr, 0; 0, 0, Llr]*[cos(θ), sin(θ), 0; -sin(θ), cos(θ), 0; 0, 0, 1] simplify → [1.5*Lm + Llr, 0, 0; 0, 1.5*Lm + Llr, 0; 0, 0, Llr]
# Torque
Te == 0.5*p*(transpose(i[r])*(d/dθ(Lrs(θ)))*i[s] + transpose(i[s])*(d/dθ(Lsr(θ)))*i[r])
Lm*(d/dθ([
    cos(θ), cos(θ - 2*π/3), cos(2*π/3 + θ);
    cos(2*π/3 + θ), cos(θ), cos(θ - 2*π/3);
    cos(θ - 2*π/3), cos(2*π/3 + θ), cos(θ)
])) simplify → [
    -Lm*sin(θ), Lm*sin(π/3 + θ), -Lm*cos(π/6 + θ);
    -Lm*cos(π/6 + θ), -Lm*sin(θ), Lm*sin(π/3 + θ);
    Lm*sin(π/3 + θ), -Lm*cos(π/6 + θ), -Lm*sin(θ)
]
# ctrl+1: transpose
transpose([cos(θ), sin(θ), 0; -sin(θ), cos(θ), 0; 0, 0, 1])*transpose([1, 0, 1; -1/2, sqrt(3)/2, 1; -1/2, -sqrt(3)/2, 1])*[
    -Lm*sin(θ), Lm*sin(π/3 + θ), -Lm*cos(π/6 + θ);
    -Lm*cos(π/6 + θ), -Lm*sin(θ), Lm*sin(π/3 + θ);
    Lm*sin(π/3 + θ), -Lm*cos(π/6 + θ), -Lm*sin(θ)
]*[1, 0, 1; -1/2, sqrt(3)/2, 1; -1/2, -sqrt(3)/2, 1] simplify → [0, 9*Lm/4, 0; -9*Lm/4, 0, 0; 0, 0, 0]
transpose(i[r])*(d/dθ(Lrs(θ)))*i[s]
[i[rα], i[rβ], 0]*[0, 9*Lm/4, 0; -9*Lm/4, 0, 0; 0, 0, 0]*[i[sα]; i[sβ]; 0] simplify → 9*Lm*i[rα]*i[sβ]/4 - 9*Lm*i[rβ]*i[sα]/4
transpose([1, 0, 1; -1/2, sqrt(3)/2, 1; -1/2, -sqrt(3)/2, 1])*transpose([
    -Lm*sin(θ), Lm*sin(π/3 + θ), -Lm*cos(π/6 + θ);
    -Lm*cos(π/6 + θ), -Lm*sin(θ), Lm*sin(π/3 + θ);
    Lm*sin(π/3 + θ), -Lm*cos(π/6 + θ), -Lm*sin(θ)
])*[1, 0, 1; -1/2, sqrt(3)/2, 1; -1/2, -sqrt(3)/2, 1]*[cos(θ), sin(θ), 0; -sin(θ), cos(θ), 0; 0, 0, 1] simplify → [0, -9*Lm/4, 0; 9*Lm/4, 0, 0; 0, 0, 0]
transpose(i[s])*(d/dθ(Lsr(θ)))*i[r]
[i[sα], i[sβ], 0]*[0, -9*Lm/4, 0; 9*Lm/4, 0, 0; 0, 0, 0]*[i[rα]; i[rβ]; 0] simplify → 9*Lm*i[rα]*i[sβ]/4 - 9*Lm*i[rβ]*i[sα]/4
Te == 0.5*p*(transpose(i[r])*(d/dθ(Lrs(θ)))*i[s] + transpose(i[s])*(d/dθ(Lsr(θ)))*i[r])
0.5*p*(9*Lm*i[rα]*i[sβ]/4 - 9*Lm*i[rβ]*i[sα]/4)*2 substitute, Lm == 2/3*LM; simplify; collect, 1.5*p*LM → (1.0*i[rα]*i[sβ] - 1.0*i[rβ]*i[sα])*(1.5*LM*p)
# abc frame
[i[ra], i[rb], i[rc]]*[
    cos(θ), cos(θ - 2*π/3), cos(2*π/3 + θ);
    cos(2*π/3 + θ), cos(θ), cos(θ - 2*π/3);
    cos(θ - 2*π/3), cos(2*π/3 + θ), cos(θ)
]*[i[sa]; i[sb]; i[sc]] collect, cos(θ), cos(2*π/3 + θ), cos(θ - 2*π/3) → (i[ra]*i[sa] + i[rb]*i[sb] + i[rc]*i[sc])*cos(θ) + (i[rb]*i[sa] + i[ra]*i[sc] + i[rc]*i[sb])*cos(2*π/3 + θ) + (i[ra]*i[sb] + i[rc]*i[sa] + i[rb]*i[sc])*cos(θ - 2*π/3)
